<?xml version="1.0"?>
<?xml-stylesheet type="text/xsl" href="http://jsbsim.sourceforge.net/JSBSim.xsl"?>
<fdm_config name="F-100D" version="2.0" release="ALPHA"
   xmlns:xsi="http://www.w3.org/2001/XMLSchema-instance"
   xsi:noNamespaceSchemaLocation="http://jsbsim.sourceforge.net/JSBSim.xsd">

 <fileheader>
  <author> Aeromatic v 0.9 </author>
  <filecreationdate> now </filecreationdate>
  <version> 0.0 </version>
  <description> Models a F-100D. </description>
 </fileheader>

<!-- Initial AeroMatic output:
  File:     F-100D.xml
  Inputs:
    name:          F-100D
    type:          single-engine transonic/supersonic fighter
    max weight:    37000.0 lb
    wing span:     38.8 ft
    length:        49.3 ft
    wing area:     400 sq-ft
    gear type:     tricycle
    retractable?:  yes
    # engines:     1
    engine type:   turbine
    engine layout: aft fuselage
    yaw damper?    yes
  Outputs:
    wing loading:  92.50 lb/sq-ft
    CL-alpha:      3.5 per radian
    CL-0:          0.08
    CL-max:        1
    CD-0:          0.021
    K:             0.09
-->

 <metrics>
   <wingarea  unit="FT2">  400.18 </wingarea>
   <wingspan  unit="FT" >   38.80 </wingspan>
   <wing_incidence>          1.00 </wing_incidence>
   <chord     unit="FT" >   10.31 </chord>
   <htailarea unit="FT2">   80.00 </htailarea>
   <htailarm  unit="FT" >   19.72 </htailarm>
   <vtailarea unit="FT2">   48.00 </vtailarea>
   <vtailarm  unit="FT" >   19.72 </vtailarm>
   <location name="AERORP" unit="IN">
     <x> 302.00 </x>
     <y>   0.00 </y>
     <z>  -9.00 </z>
   </location>
   <location name="EYEPOINT" unit="IN">
     <x> 118.32 </x>
     <y>   0.00 </y>
     <z>  36.00 </z>
   </location>
   <location name="VRP" unit="IN">
     <x>302</x>
     <y>0</y>
     <z>0</z>
   </location>
 </metrics>

 <mass_balance>
   <ixx unit="SLUG*FT2">     18916 </ixx>
   <iyy unit="SLUG*FT2">     51318 </iyy>
   <izz unit="SLUG*FT2">     53512 </izz>
   <ixy unit="SLUG*FT2">         0 </ixy>
   <ixz unit="SLUG*FT2">         0 </ixz>
   <iyz unit="SLUG*FT2">         0 </iyz>
   <emptywt unit="LBS" >     20638 </emptywt>
   <location name="CG" unit="IN">
     <x> 302.00 </x>
     <y>   0.00 </y>
     <z>  -6.00 </z>
   </location>
   <pointmass name="station1">
      <weight unit="LBS"> 520 </weight>
      <location name="POINTMASS" unit="IN">
          <x> 403 </x>
          <y>-159 </y>
          <z> -22 </z>
      </location>
   </pointmass>
   <pointmass name="station2">
      <weight unit="LBS"> 100 </weight>
      <location name="POINTMASS" unit="IN">
          <x> 305 </x>
          <y> -88 </y>
          <z> -22 </z>
      </location>
   </pointmass>
   <pointmass name="station3">
      <weight unit="LBS"> 820 </weight>
      <location name="POINTMASS" unit="IN">
          <x> 257 </x>
          <y> -52 </y>
          <z> -25 </z>
      </location>
   </pointmass>
   <pointmass name="station4">
      <weight unit="LBS"> 0 </weight>
      <location name="POINTMASS" unit="IN">
          <x> 310 </x>
          <y>   0 </y>
          <z> -24 </z>
      </location>
   </pointmass>
   <pointmass name="station5">
      <weight unit="LBS"> 820 </weight>
      <location name="POINTMASS" unit="IN">
          <x> 257 </x>
          <y>  52 </y>
          <z> -25 </z>
      </location>
   </pointmass>
   <pointmass name="station6">
      <weight unit="LBS"> 100 </weight>
      <location name="POINTMASS" unit="IN">
          <x> 305 </x>
          <y>  88 </y>
          <z> -22 </z>
      </location>
   </pointmass>
   <pointmass name="station7">
      <weight unit="LBS"> 520 </weight>
      <location name="POINTMASS" unit="IN">
          <x> 403 </x>
          <y> 159 </y>
          <z> -22 </z>
      </location>
   </pointmass>
 </mass_balance>

 <ground_reactions>

  <contact type="BOGEY" name="NOSE">
   <location unit="IN">
     <x> 145.00 </x>
     <y>   0.00 </y>
     <z> -83.00 </z>
   </location>
   <static_friction>  0.80 </static_friction>
   <dynamic_friction> 0.50 </dynamic_friction>
   <rolling_friction> 0.02 </rolling_friction>
   <spring_coeff unit="LBS/FT">      11100.00 </spring_coeff>
   <damping_coeff unit="LBS/FT/SEC">  6700.00 </damping_coeff>
   <relaxation_velocity>
      <rolling>0.3</rolling>
      <side>0.5</side>
   </relaxation_velocity>
   <max_steer unit="DEG"> 60.00 </max_steer>
   <brake_group>NONE</brake_group>
   <retractable>1</retractable>
 </contact>

  <contact type="BOGEY" name="LEFT_MAIN">
   <location unit="IN">
     <x> 320.00 </x>
     <y> -76.00 </y>
     <z> -76.00 </z>
   </location>
   <static_friction>  0.80 </static_friction>
   <dynamic_friction> 0.50 </dynamic_friction>
   <rolling_friction> 0.02 </rolling_friction>
   <spring_coeff unit="LBS/FT">      37000.00 </spring_coeff>
   <damping_coeff unit="LBS/FT/SEC"> 17400.00 </damping_coeff>
   <relaxation_velocity>
      <rolling>0.3</rolling>
      <side>0.5</side>
   </relaxation_velocity>
   <max_steer unit="DEG">0</max_steer>
   <brake_group>LEFT</brake_group>
   <retractable>1</retractable>
 </contact>

  <contact type="BOGEY" name="RIGHT_MAIN">
   <location unit="IN">
     <x> 320.00 </x>
     <y>  76.00 </y>
     <z> -76.00 </z>
   </location>
   <static_friction>  0.80 </static_friction>
   <dynamic_friction> 0.50 </dynamic_friction>
   <rolling_friction> 0.02 </rolling_friction>
   <spring_coeff unit="LBS/FT">      37000.00 </spring_coeff>
   <damping_coeff unit="LBS/FT/SEC"> 17400.00 </damping_coeff>
   <relaxation_velocity>
      <rolling>0.3</rolling>
      <side>0.5</side>
   </relaxation_velocity>
   <max_steer unit="DEG">0</max_steer>
   <brake_group>RIGHT</brake_group>
   <retractable>1</retractable>
 </contact>

  <contact type="STRUCTURE" name="LEFT_WING">
    <location unit="IN">
     <x> 354.96 </x>
     <y>-232.00 </y>
     <z> -14.00 </z>
    </location>
    <static_friction>  0.80 </static_friction>
    <dynamic_friction> 0.50 </dynamic_friction>
    <spring_coeff unit="LBS/FT">       1000.00 </spring_coeff>
    <damping_coeff unit="LBS/FT/SEC">  7000.00 </damping_coeff>
    <damping_coeff_rebound unit="LBS/FT/SEC"> 100.0 </damping_coeff_rebound>
 </contact>

  <contact type="STRUCTURE" name="RIGHT_WING">
    <location unit="IN">
     <x> 354.96 </x>
     <y> 232.00 </y>
     <z> -14.00 </z>
    </location>
    <static_friction>  0.80 </static_friction>
    <dynamic_friction> 0.50 </dynamic_friction>
    <spring_coeff unit="LBS/FT">       1000.00 </spring_coeff>
    <damping_coeff unit="LBS/FT/SEC">  7000.00 </damping_coeff>
    <damping_coeff_rebound unit="LBS/FT/SEC"> 100.0 </damping_coeff_rebound>
 </contact>

  <contact type="STRUCTURE" name="AFT_FUSELAGE">
    <location unit="IN">
     <x> 450 </x>
     <y>   0 </y>
     <z> -20 </z>
    </location>
    <static_friction>  0.80 </static_friction>
    <dynamic_friction> 0.50 </dynamic_friction>
    <spring_coeff unit="LBS/FT">       1000.00 </spring_coeff>
    <damping_coeff unit="LBS/FT/SEC">  7000.00 </damping_coeff>
    <damping_coeff_rebound unit="LBS/FT/SEC"> 100.0 </damping_coeff_rebound>
 </contact>

  <contact type="STRUCTURE" name="FWD_FUSELAGE">
    <location unit="IN">
     <x>  50 </x>
     <y>   0 </y>
     <z> -20 </z>
    </location>
    <static_friction>  0.80 </static_friction>
    <dynamic_friction> 0.50 </dynamic_friction>
    <spring_coeff unit="LBS/FT">       1000.00 </spring_coeff>
    <damping_coeff unit="LBS/FT/SEC">  7000.00 </damping_coeff>
    <damping_coeff_rebound unit="LBS/FT/SEC"> 100.0 </damping_coeff_rebound>
 </contact>

 </ground_reactions>

 <propulsion>

   <engine file="J57">
    <location unit="IN">
      <x> 531.60 </x>
      <y>   0.00 </y>
      <z>   0.00 </z>
    </location>
    <feed>0</feed>
    <feed>1</feed>
    <feed>2</feed>
    <thruster file="direct">
     <location unit="IN">
       <x> 531.60 </x>
       <y>   0.00 </y>
       <z>   0.00 </z>
     </location>
     <orient unit="DEG">
       <pitch> 0.00 </pitch>
       <roll>  0.00 </roll>
       <yaw>   0.00 </yaw>
     </orient>
    </thruster>
  </engine>

  <!-- internal fuel -->
  <tank type="FUEL">
     <location unit="IN">
       <x> 300.00 </x>
       <y>   0.00 </y>
       <z>  -5.00 </z>
     </location>
     <priority>2</priority>
     <density unit="LBS/GAL"> 6.48 </density>
     <capacity unit="LBS"> 11650 </capacity>
     <contents unit="LBS"> 10000 </contents>
     <standpipe unit="LBS"> 1000 </standpipe>
  </tank>

  <!-- left 335 gallon external drop tank -->
  <tank type="FUEL">
     <location unit="IN">
       <x> 300.00 </x>
       <y> -80.00 </y>
       <z> -38.00 </z>
     </location>
     <density unit="LBS/GAL"> 6.48 </density>
     <capacity unit="LBS"> 2244 </capacity>
     <contents unit="LBS"> 0 </contents>
  </tank>

  <!-- right 335 gallon external drop tank -->
  <tank type="FUEL">
     <location unit="IN">
       <x> 300.00 </x>
       <y>  80.00 </y>
       <z> -38.00 </z>
     </location>
     <density unit="LBS/GAL"> 6.48 </density>
     <capacity unit="LBS"> 2244 </capacity>
     <contents unit="LBS"> 0 </contents>
  </tank>

  <dump-rate unit="LBS/MIN"> 2000 </dump-rate>

 </propulsion>

 <system file="hook"/>
 <system file="refuel"/>
 <system file="gear"/>
 <system file="flaps"/>
 <system file="speedbrakes"/>
 <system file="FCS-pitch"/>
 <system file="FCS-roll"/>
 <system file="FCS-yaw"/>
 <system file="NWS"/>
 <system file="alpha_buffet"/>
 <system file="dump"/>
 <system file="chute"/>
 <system file="armament"/>
 <system file="crash-detect"/>
 <system file="beacon"/>
 <system file="autoslats"/>
 <system file="particles"/>


 <flight_control name="FCS: F-100D">
 </flight_control>

 <aerodynamics>

        <function name="aero/function/kCDge">
            <description>Change_in_drag_due_to_ground_effect</description>
            <product>
                  <table>
                      <independentVar>aero/h_b-mac-ft</independentVar>
                      <tableData>
                          0.0000	0.4800
                          0.1000	0.5150
                          0.1500	0.6290
                          0.2000	0.7090
                          0.3000	0.8150
                          0.4000	0.8820
                          0.5000	0.9280
                          0.6000	0.9620
                          0.7000	0.9880
                          0.8000	1.0000
                      </tableData>
                  </table>
            </product>
        </function>

        <function name="aero/function/kCLge">
            <description>Change_in_lift_due_to_ground_effect</description>
            <product>
                  <table>
                      <independentVar>aero/h_b-mac-ft</independentVar>
                      <tableData>
                          0.0000	1.2030
                          0.1000	1.1270
                          0.1500	1.0900
                          0.2000	1.0730
                          0.3000	1.0460
                          0.4000	1.0550
                          0.5000	1.0190
                          0.6000	1.0130
                          0.7000	1.0080
                          0.8000	1.0060
                          0.9000	1.0030
                          1.0000	1.0020
                          1.1000	1.0000
                      </tableData>
                  </table>
            </product>
        </function>

  <axis name="LIFT">

    <function name="aero/coefficient/CLalpha">
      <description>Lift_due_to_alpha</description>
      <product>
          <property>aero/qbar-psf</property>
          <property>metrics/Sw-sqft</property>
          <property>aero/function/kCLge</property>
          <table>
            <independentVar lookup="row">aero/alpha-rad</independentVar>
            <tableData>
              -0.20 -0.700
               0.00  0.000
               0.26  0.880
               0.60  0.400
            </tableData>
          </table>
      </product>
    </function>

    <function name="aero/coefficient/dCLflap">
       <description>Delta_Lift_due_to_flaps</description>
       <product>
           <property>aero/qbar-psf</property>
           <property>metrics/Sw-sqft</property>
          <table>
            <independentVar lookup="row">fcs/flap-pos-norm</independentVar>
            <tableData>
               0.00  0.00
               0.50  0.15
               1.00  0.30
            </tableData>
          </table>
       </product>
    </function>

    <function name="aero/coefficient/CLde">
       <description>Lift_due_to_Elevator_Deflection</description>
       <product>
           <property>aero/qbar-psf</property>
           <property>metrics/Sw-sqft</property>
           <property>fcs/elevator-pos-rad</property>
           <value>0.2</value>
       </product>
    </function>

    <function name="aero/coefficient/buffet">
       <description>Buffet at high alpha</description>
         <product>
           <property>systems/alpha_buffet/sine_wave</property>
           <property>systems/alpha_buffet/strength</property>
         </product>
    </function>

  </axis>

  <axis name="DRAG">

    <function name="aero/coefficient/CD0">
       <description>Basic_drag</description>
       <product>
          <property>aero/qbar-psf</property>
          <property>metrics/Sw-sqft</property>
          <table>
            <independentVar lookup="row">aero/alpha-rad</independentVar>
            <tableData>
             -1.57    1.500
             -0.26    0.028
              0.00    0.019
              0.26    0.028
              1.57    1.500
            </tableData>
          </table>
       </product>
    </function>

    <function name="aero/coefficient/CDi">
       <description>Induced_drag</description>
         <product>
           <property>aero/qbar-psf</property>
           <property>metrics/Sw-sqft</property>
           <property>aero/cl-squared</property>
           <property>aero/function/kCDge</property>
           <value>0.13</value>
         </product>
    </function>

    <function name="aero/coefficient/CDmach">
       <description>Drag_due_to_mach</description>
        <product>
          <property>aero/qbar-psf</property>
          <property>metrics/Sw-sqft</property>
          <table>
            <independentVar lookup="row">velocities/mach</independentVar>
            <tableData>
                0.00      0.000
                0.81      0.000
                1.10      0.021
                1.80      0.010
            </tableData>
          </table>
        </product>
    </function>

    <function name="aero/coefficient/CDflap">
       <description>Drag_due_to_flaps</description>
         <product>
           <property>aero/qbar-psf</property>
           <property>metrics/Sw-sqft</property>
          <table>
            <independentVar lookup="row">fcs/flap-pos-norm</independentVar>
            <tableData>
               0.00  0.00
               0.50  0.015
               1.00  0.04
            </tableData>
          </table>
         </product>
    </function>

    <function name="aero/coefficient/CDbc">
       <description>Drag_due_to_braking_chute</description>
         <product>
           <property>aero/qbar-psf</property>
           <property>metrics/Sw-sqft</property>
           <property>systems/chute/unfurl-norm</property>
           <value>0.65</value>
         </product>
    </function>

    <function name="aero/coefficient/CDgear">
       <description>Drag_due_to_gear</description>
         <product>
           <property>aero/qbar-psf</property>
           <property>metrics/Sw-sqft</property>
           <property>gear/gear-pos-norm</property>
           <value>0.025</value>
         </product>
    </function>

    <function name="aero/coefficient/CDsb">
       <description>Drag_due_to_speedbrakes</description>
         <product>
           <property>aero/qbar-psf</property>
           <property>metrics/Sw-sqft</property>
           <property>fcs/speedbrake-pos-norm</property>
           <value>0.021</value>
         </product>
    </function>

    <function name="aero/coefficient/CDbeta">
       <description>Drag_due_to_sideslip</description>
       <product>
          <property>aero/qbar-psf</property>
          <property>metrics/Sw-sqft</property>
          <table>
            <independentVar lookup="row">aero/beta-rad</independentVar>
            <tableData>
              -1.57    1.230
              -0.26    0.050
               0.00    0.000
               0.26    0.050
               1.57    1.230
            </tableData>
          </table>
       </product>
    </function>

    <function name="aero/coefficient/CDde">
       <description>Drag_due_to_Elevator_Deflection</description>
       <product>
           <property>aero/qbar-psf</property>
           <property>metrics/Sw-sqft</property>
           <abs><property>fcs/elevator-pos-norm</property></abs>
           <value>0.04</value>
       </product>
    </function>

  </axis>

  <axis name="SIDE">

    <function name="aero/coefficient/CYb">
       <description>Side_force_due_to_beta</description>
       <product>
           <property>aero/qbar-psf</property>
           <property>metrics/Sw-sqft</property>
           <property>aero/beta-rad</property>
           <value>-1</value>
       </product>
    </function>

  </axis>

  <axis name="ROLL">

    <function name="aero/coefficient/Clb">
       <description>Roll_moment_due_to_beta</description>
       <product>
           <property>aero/qbar-psf</property>
           <property>metrics/Sw-sqft</property>
           <property>metrics/bw-ft</property>
           <property>aero/beta-rad</property>
          <table>
            <independentVar lookup="row">aero/alpha-rad</independentVar>
            <tableData>
               0.00  -0.2
               0.10  -0.3
               0.30  -0.6
            </tableData>
          </table>
       </product>
    </function>

    <function name="aero/coefficient/Clp">
       <description>Roll_moment_due_to_roll_rate</description>
       <product>
           <property>aero/qbar-psf</property>
           <property>metrics/Sw-sqft</property>
           <property>metrics/bw-ft</property>
           <property>aero/bi2vel</property>
           <property>velocities/p-aero-rad_sec</property>
           <value>-0.4</value>
       </product>
    </function>

    <function name="aero/coefficient/Clr">
       <description>Roll_moment_due_to_yaw_rate</description>
       <product>
           <property>aero/qbar-psf</property>
           <property>metrics/Sw-sqft</property>
           <property>metrics/bw-ft</property>
           <property>aero/bi2vel</property>
           <property>velocities/r-aero-rad_sec</property>
           <value>0.12</value>
       </product>
    </function>

    <function name="aero/coefficient/Clda">
       <description>Roll_moment_due_to_aileron</description>
       <product>
          <property>aero/qbar-psf</property>
          <property>metrics/Sw-sqft</property>
          <property>metrics/bw-ft</property>
          <property>fcs/left-aileron-pos-rad</property>
          <table>
            <independentVar lookup="row">velocities/mach</independentVar>
            <tableData>
              0.0    0.110
              2.0    0.037
            </tableData>
          </table>
       </product>
    </function>

    <function name="aero/coefficient/Cldr">
       <description>Roll_moment_due_to_rudder</description>
       <product>
           <property>aero/qbar-psf</property>
           <property>metrics/Sw-sqft</property>
           <property>metrics/bw-ft</property>
           <property>fcs/rudder-pos-rad</property>
           <table>
             <independentVar lookup="row">aero/alpha-rad</independentVar>
             <tableData>
               0.00  0.005
               0.10  0.010
               0.30  0.020
             </tableData>
           </table>
       </product>
    </function>

  </axis>

  <axis name="PITCH">

    <function name="aero/coefficient/Cmalpha">
       <description>Pitch_moment_due_to_alpha</description>
       <product>
           <property>aero/qbar-psf</property>
           <property>metrics/Sw-sqft</property>
           <property>metrics/cbarw-ft</property>
           <property>aero/alpha-rad</property>
           <value>-0.3</value>
       </product>
    </function>

    <function name="aero/coefficient/Cmde">
       <description>Pitch_moment_due_to_elevator</description>
       <product>
          <property>aero/qbar-psf</property>
          <property>metrics/Sw-sqft</property>
          <property>metrics/cbarw-ft</property>
          <property>fcs/elevator-pos-rad</property>
          <table>
            <independentVar lookup="row">velocities/mach</independentVar>
            <tableData>
              0.0     -0.700
              2.0     -0.150
            </tableData>
          </table>
       </product>
    </function>

    <function name="aero/coefficient/Cmq">
       <description>Pitch_moment_due_to_pitch_rate</description>
       <product>
           <property>aero/qbar-psf</property>
           <property>metrics/Sw-sqft</property>
           <property>metrics/cbarw-ft</property>
           <property>aero/ci2vel</property>
           <property>velocities/q-aero-rad_sec</property>
           <value>-16</value>
       </product>
    </function>

    <function name="aero/coefficient/Cmadot">
       <description>Pitch_moment_due_to_alpha_rate</description>
       <product>
           <property>aero/qbar-psf</property>
           <property>metrics/Sw-sqft</property>
           <property>metrics/cbarw-ft</property>
           <property>aero/ci2vel</property>
           <property>aero/alphadot-rad_sec</property>
           <value>-9</value>
       </product>
    </function>

  </axis>

  <axis name="YAW">

    <function name="aero/coefficient/Cnb">
       <description>Yaw_moment_due_to_beta</description>
       <product>
           <property>aero/qbar-psf</property>
           <property>metrics/Sw-sqft</property>
           <property>metrics/bw-ft</property>
           <property>aero/beta-rad</property>
           <value>0.12</value>
       </product>
    </function>

    <function name="aero/coefficient/Cnr">
       <description>Yaw_moment_due_to_yaw_rate</description>
       <product>
           <property>aero/qbar-psf</property>
           <property>metrics/Sw-sqft</property>
           <property>metrics/bw-ft</property>
           <property>aero/bi2vel</property>
           <property>velocities/r-aero-rad_sec</property>
           <value>-0.15</value>
       </product>
    </function>

    <function name="aero/coefficient/Cndr">
       <description>Yaw_moment_due_to_rudder</description>
       <product>
           <property>aero/qbar-psf</property>
           <property>metrics/Sw-sqft</property>
           <property>metrics/bw-ft</property>
           <property>fcs/rudder-pos-rad</property>
           <value>-0.015</value>
       </product>
    </function>

    <function name="aero/coefficient/Cnda">
       <description>Adverse_yaw</description>
       <product>
           <property>aero/qbar-psf</property>
           <property>metrics/Sw-sqft</property>
           <property>metrics/bw-ft</property>
           <property>fcs/left-aileron-pos-rad</property>
          <table>
            <independentVar lookup="row">aero/alpha-rad</independentVar>
            <tableData>
               0.20  0
               0.30 -0.1
            </tableData>
          </table>
       </product>
    </function>

  </axis>

 </aerodynamics>

 <external_reactions>

  <force name="hook" frame="BODY">
   <location unit="IN">
     <x>  422.0 </x>
     <y>    0.0 </y>
     <z>  -33.0 </z>
   </location>
   <direction>
     <x>  -0.9995 </x>
     <y>   0.0    </y>
     <z>   0.01 </z>
   </direction>
  </force>

 </external_reactions>

</fdm_config>
